# 6-Axis IMU Fusion Algorithm
# This algorithm utilized both the acceleretometer and gyroscope readings to calculate roll and pitch angles. Gyroscope data is used to minimize the accelerometer jiggle in the measurements. Orientation calculation makes use of quaternions described by the Irish mathematician William Rowan Hamilton in 1843.
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# Quaternions are very efficient for analyzing situations where rotations in three dimensions are involved. A quaternion is a 4-tuple, which is a more concise representation than a rotation matrix. Its geometric meaning is also more obvious as the rotation axis and angle can be trivially recovered.
# Let's define a quaternion vector,
q == q_0 + q_1*i + q_2*j + q_3*k
i^2 == j^2 == k^2 == i*j*k == -1
vectorize(q) == [q_0; q_1; q_2; q_3]
# It is important to know this vector notation for quaternions,when we discuss the fusion algorithm this will become handy.
# Start with an initial condition where the unity gravitational vector is assumed to be in purely  z-axis. Comma deliminator represents the measurement take.
vectorize(g_measured,0) == [0; 0; -1]
# The first thing to do after setting initial condition to define, or get, sensor data. Chronogically this is the initial take of measurements but for sake of notation it will be denoted as i'th measurement.
vectorize(ω_gyro,i) == [ω_x,i; ω_y,i; ω_z,i]*deg/s
vectorize(a_accel,i) == [a_x,i; a_y,i; a_z,i]*mg
# Then define the quaternion vector for the gyroscope reading. We take the discrete integrals for defining the vector. Such that, 'dt' denotes the sampling period and the quaternion consisting change in angle.
vectorize(q_gyro,i) == [
    1 - integral(ω_x,i, t)^2*integral(ω_y,i, t)^2*integral(ω_z,i, t)^2/2;
    -integral(ω_x,i, t)/2;
    -integral(ω_y,i, t)/2;
    -integral(ω_z,i, t)/2
]
# Using gyro quaternion rotating the initial gravitational vector, result  first measure of the gravitational vector.
# This is the quaternion of the measured gravitational vector. chronogically this is the initial condition that is defined above but for the notations sake it will be referred as i'th measurement.
vectorize(q_g,measured,i) == [0; g_x_measured,i; g_y_measured,i; g_z_measured,i]
# There is three types of vector multiplication operations to mention, dot product, cross product and quaternion product. Quaternion product is denoted with cross in a circle.
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# )
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# (
vectorize(q_g,measured,i)
vectorize(q_gyro,i)
vectorize(conj(q_gyro,i)) == vectorize(q_g,measured,gyro,i)
# By multiplying the initial condition or resulting measured gravity quaternion with the gyroscope quaternion and its conjugate, it gives the quaternion of the rotated gravity vector. By the calculated angles using the gyro.
quaternion_product == cross_product - dot_product
# Using the gyro rotated gravity vector quaternion extract the 3D unit vector.
vectorize(g_measured,gyro,i) == [
    transpose(vectorize(q_g,measured,gyro,i))[:, 2];
    transpose(vectorize(q_g,measured,gyro,i))[:, 3];
    transpose(vectorize(q_g,measured,gyro,i))[:, 4]
]
# Then the accelerometer data is normalized and fused with the gyroscope vector with pre-defined fusion coefficents
vectorize(a_accel,normalized,i) == ((vectorize(a_accel,i) == [a_x,i; a_y,i; a_z,i])/|vectorize(a_accel,i) == [a_x,i; a_y,i; a_z,i]|)
# Fusion coefficent is calculated by the angle difference of the accelerometer imposed gravity vector and gyroscope imposed gravity vector.
ξ == 40 if (vectorize(a_accel,normalized,i)*vectorize(g_measured,gyro,i) == 1*1*cosβ) ≤ 0.96
ξ == 10 if (vectorize(a_accel,normalized,i)*vectorize(g_measured,gyro,i) == 1*1*cosβ) ≥ 0.96
# Fusing the measured vectors from accel and gyro, results the next iteration of the measured gravitational vector.
vectorize(g_measured,i+1) == (ξ*vectorize(g_measured,gyro,i) + vectorize(a_accel,normalized,i))/|ξ*vectorize(g_measured,gyro,i) + vectorize(a_accel,normalized,i)|
# (It is an unit vector)
# To obtain the angle between the measured gravitational vector and the reference gravitational vector, again the vectors converted to quaternions. This time, quaternion is calculated between a reference and measurement
(vectorize(g_reference) == [0; 0; -9.81])*m/s^2
vectorize(g_reference,normalized) == vectorize(g_reference,normalized)/|vectorize(g_reference,normalized)|
# Calculate the Euler angle and Euler axis,
vectorize(g_measured,i+1)*(vectorize(g_reference,normalized) + vectorize(g_measured,i+1))/|vectorize(g_reference,normalized) + vectorize(g_measured,i+1)| == ε_angle
vectorize(g_measured,i+1)×((vectorize(g_reference,normalized) + vectorize(g_measured,i+1))/|vectorize(g_reference,normalized) + vectorize(g_measured,i+1)|) == ε_axis
# (It is an unit 3D vector)
# Construct quaternion in between reference and measurement,
vectorize(q_in_between) == [ε_angle; transpose(ε_axis)[:, 1]; transpose(ε_axis)[:, 2]; transpose(ε_axis)[:, 3]]
# Calculate euler angles (rotation angles) using the quaternion between measured and reference,
ϕ == (180 deg/π)*arctan((transpose(vectorize(q_in_between))[:, 1]*transpose(vectorize(q_in_between))[:, 2] + transpose(vectorize(q_in_between))[:, 3]*transpose(vectorize(q_in_between))[:, 4])/(1 - 2*(transpose(vectorize(q_in_between))[:, 2]^2 + transpose(vectorize(q_in_between))[:, 3]^2)))
θ == (180 deg/π)*arcsin(transpose(vectorize(q_in_between))[:, 1]*transpose(vectorize(q_in_between))[:, 3] - transpose(vectorize(q_in_between))[:, 4]*transpose(vectorize(q_in_between))[:, 2])
